*Heading
** Job name: UltimateLoadBuckle Model name: Model-1
** Generated by: Abaqus/CAE 2025
*Preprint, echo=NO, model=NO, history=NO, contact=NO
**
** PARTS
**
*Part, name="Landing gear frame"
*Node
      1,   41.4547081,           0.,           0.
      2,   41.4547081,  -6.22863865,           0.
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*Element, type=C3D8R
   1,   214,  2685, 10243,  1551,     1,    33,  1461,    60
   2,  2685,  2686, 10244, 10243,    33,    34,  1462,  1461
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*Nset, nset=Set-1, generate
     1,  23772,      1
*Elset, elset=Set-1, generate
     1,  18432,      1
** Section: Aluminum
*Solid Section, elset=Set-1, material=Aluminum
,
*End Part
**
**
** ASSEMBLY
**
*Assembly, name=Assembly
**
*Instance, name="Landing gear frame-1", part="Landing gear frame"
*End Instance
**
*Nset, nset=Set-1, instance="Landing gear frame-1"
    1,    4,   10,   11,   29,   30
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*Elset, elset=Set-1, instance="Landing gear frame-1", generate
 12787,  13727,      1
*Elset, elset=_Surf-1_S4, internal, instance="Landing gear frame-1"
 7721, 7722, 7790, 7791, 8134, 8135
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*Elset, elset=_Surf-1_S6, internal, instance="Landing gear frame-1"
  7723,  7724,  7770,  7777,  7779,  7783
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*Elset, elset=_Surf-1_S3, internal, instance="Landing gear frame-1"
 10204, 10260, 10262, 10642, 10698, 10700
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*Elset, elset=_Surf-1_S5, internal, instance="Landing gear frame-1"
 10205, 10265, 10326, 10339, 10340, 10342
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*Surface, type=ELEMENT, name=Surf-1
_Surf-1_S4, S4
_Surf-1_S6, S6
_Surf-1_S3, S3
_Surf-1_S5, S5
*Elset, elset=_Surf-2_S4, internal, instance="Landing gear frame-1"
 7721, 7722, 7790, 7791, 8134, 8135
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*Elset, elset=_Surf-2_S6, internal, instance="Landing gear frame-1"
  7723,  7724,  7770,  7777,  7779,  7783
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*Elset, elset=_Surf-2_S3, internal, instance="Landing gear frame-1"
 10204, 10260, 10262, 10642, 10698, 10700
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*Elset, elset=_Surf-2_S5, internal, instance="Landing gear frame-1"
 10205, 10265, 10326, 10339, 10340, 10342
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*Surface, type=ELEMENT, name=Surf-2
_Surf-2_S4, S4
_Surf-2_S6, S6
_Surf-2_S3, S3
_Surf-2_S5, S5
*End Assembly
**
** MATERIALS
**
*Material, name=Aluminum
*Density
 2.7e-09,
*Elastic
70000., 0.33
**
** BOUNDARY CONDITIONS
**
** Name: Fixed Type: Symmetry/Antisymmetry/Encastre
*Boundary
Set-1, ENCASTRE
** ----------------------------------------------------------------
**
** STEP: Buckling
**
*Step, name=Buckling, nlgeom=NO, perturbation
*Buckle
5, , 10, 300
**
** BOUNDARY CONDITIONS
**
** Name: Fixed Type: Symmetry/Antisymmetry/Encastre
*Boundary, op=NEW, load case=1
Set-1, ENCASTRE
*Boundary, op=NEW, load case=2
Set-1, ENCASTRE
**
** LOADS
**
** Name: PressureLoadBuckle   Type: Pressure
*Dsload
Surf-2, P, 4.42415
**
** OUTPUT REQUESTS
**
*Restart, write, frequency=0
**
** FIELD OUTPUT: F-Output-2
**
*Output, field, variable=PRESELECT
*End Step
